/prep7
et,1,shell41
r,1,2.5e-3
mp,ex,1,1.2e11
mp,prxy,1,0.3
k,1,0.05,0,0
k,2,0.05,0,0.1
l,1,2
k,3,
k,4,0,0,0.1
/pnum,kp,1
/pnum,line,1
arotat,1,,,,,,3,4,90
lsel,s,,,1
lesize,all,,,8
allsel
amesh,all
finish

/solu
antype,static
nsel,s,loc,x,0
dsym,symm,x,0
nsel,s,loc,y,0
dsym,symm,y,0
nsel,s,loc,z,0
dsym,symm,z,0
allsel
fk,5,fy,-500
lsel,s,loc,z,0.1
dl,all,,all
allsel
solve
finish

/post1
pldisp,1
plnsol,u,sum
plnsol,s,int
