/prep7
et,1,beam188
mp,ex,1,2.2e11
mp,prxy,1,0.3
sectype,1,0.13,0.13,0.32,0.015,0.015,0.0095
k,1
k,2,1.0
/pnum,kp,1
/pnum,line,1
l,1,2
esize,,10
lmesh,1
finish

/solu
dk,1,,,,0,all
fk,2,fy,-8000
fk,2,fx,5000
solve
finish

/post1
pldisp,1
plnsol,u,y
prrsol
finish
