/FILENAME,ansys_work1
/TITLE,The Stress calculating of flat
/PREP7
ET,1,PLANE82
MP,EX,1,2e11
MP,PRXY,1,0.3
RECTNG,,0.1,,0.05
CYL4,,,0.005
/PNUM,KP,1
/PNUM,LINE,1
/PNUM,AREA,1
ASBA,1,2
ESIZE,0.002,0,
MSKEKY,0
CM,_Y1,AREA
ASEL,,,,3
CM,_Y1,AREA
CHKMSH,'AREA'
CMSEL,S,_Y
AMESH,_Y1
/SOL
FLST,2,2,4,ORDE,2
FITEM,2,9
FITEM,2,-10
DL,P51X,,SYMM
FLST,2,1,4,ORDE,1
FITEM,2,2
SFL,P51X,PRES,-1e6
ALLSEL,ALL
SOLVE
FINISH
/POST1
PLNSOL,S,X,0,1.0
PLNSOL,U,SUM,0,1.0
/EXPAND,4,POLAR,HALF,,90
PLNSOL,S,X,0,1.0
FINISH
