!平板开孔
finish
/clear
/prep7
et,1,plane182            !选择单元类型
mp,ex,1,2.1e11           !设置弹性模量
mp,prxy,1,0.3            !设置泊松比
RECTNG,,0.1,,0.05,
CYL4, , ,0.01/2
ASBA,1,2
LESIZE,5, , ,10, , , , ,1
esize,0.001
amesh,all                !网格划分（需要加密开孔处单元，保证结果接近3倍q）
dl,9,,symm
dl,10,,symm
sfl,2,pres,-1e6
alls
/solu
solve
/post1
PLNSOL,S,EQV,0,1.0
